*Heading
** Job name: VAFW8RL Model name: VAFW8-RL
** Generated by: Abaqus/CAE 2024
*Preprint, echo=NO, model=NO, history=NO, contact=NO
**
** PARTS
**
*Part, name=cyllinder_1
*Node
      1,         -68.,           0.,         37.5
      2,          68.,           0.,         37.5
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*Element, type=S4R
   1,    1,   19, 1975,  236
   2,   19,   20, 1976, 1975
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*Node
  19201,           0.,           0.,         300.
*Nset, nset=cyllinder_1-RefPt_, internal
19201,
*Orientation, name=Ori-7
0., 0., 1., 1., 0., 0.
3, 0.
** Region: (C7-1: Generated From Layup)
*Elset, elset=C7-1
    1,    2,    3,    4,    5,    6
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** Section: C7-1
*Shell Section, elset=C7-1, composite, orientation=Ori-7, layup=C7
0.2, 3, T700_IDEAL, 57., Ply-1
0.2, 3, T700_IDEAL, -57., Ply-2
*Orientation, name=Ori-8
0., 0., 1., 1., 0., 0.
3, 0.
** Region: (C8-1: Generated From Layup)
*Elset, elset=C8-1
  1101,  1102,  1103,  1104,  1105,  1106
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** Section: C8-1
*Shell Section, elset=C8-1, composite, orientation=Ori-8, layup=C8
0.2, 3, T700_IDEAL, 55., Ply-1
0.2, 3, T700_IDEAL, -55., Ply-2
*Orientation, name=Ori-6
0., 0., 1., 1., 0., 0.
3, 0.
** Region: (C6-1: Generated From Layup)
*Elset, elset=C6-1
 2301, 2302, 2303, 2304, 2305, 2306
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** Section: C6-1
*Shell Section, elset=C6-1, composite, orientation=Ori-6, layup=C6
0.2, 3, T700_IDEAL, 61., Ply-1
0.2, 3, T700_IDEAL, -61., Ply-2
*Orientation, name=Ori-5
0., 0., 1., 1., 0., 0.
3, 0.
** Region: (C5-1: Generated From Layup)
*Elset, elset=C5-1
 4601, 4602, 4603, 4604, 4605, 4606
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** Section: C5-1
*Shell Section, elset=C5-1, composite, orientation=Ori-5, layup=C5
0.2, 3, T700_IDEAL, 57., Ply-1
0.2, 3, T700_IDEAL, -57., Ply-2
*Orientation, name=Ori-4
0., 0., 1., 1., 0., 0.
3, 0.
** Region: (C4-1: Generated From Layup)
*Elset, elset=C4-1
  7001,  7002,  7003,  7004,  7005,  7006
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** Section: C4-1
*Shell Section, elset=C4-1, composite, orientation=Ori-4, layup=C4
0.2, 3, T700_IDEAL, 57., Ply-1
0.2, 3, T700_IDEAL, -57., Ply-2
*Orientation, name=Ori-3
0., 0., 1., 1., 0., 0.
3, 0.
** Region: (C3-1: Generated From Layup)
*Elset, elset=C3-1
  9401,  9402,  9403,  9404,  9405,  9406
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** Section: C3-1
*Shell Section, elset=C3-1, composite, orientation=Ori-3, layup=C3
0.2, 3, T700_IDEAL, 61., Ply-1
0.2, 3, T700_IDEAL, -61., Ply-2
*Orientation, name=Ori-2
0., 0., 1., 1., 0., 0.
3, 0.
** Region: (C2-1: Generated From Layup)
*Elset, elset=C2-1
 11801, 11802, 11803, 11804, 11805, 11806
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** Section: C2-1
*Shell Section, elset=C2-1, composite, orientation=Ori-2, layup=C2
0.2, 3, T700_IDEAL, 57., Ply-1
0.2, 3, T700_IDEAL, -57., Ply-2
*Orientation, name=Ori-1
0., 0., 1., 1., 0., 0.
3, 0.
** Region: (C1-1: Generated From Layup)
*Elset, elset=C1-1
 14201, 14202, 14203, 14204, 14205, 14206
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** Section: C1-1
*Shell Section, elset=C1-1, composite, orientation=Ori-1, layup=C1
0.2, 3, T700_IDEAL, 55., Ply-1
0.2, 3, T700_IDEAL, -55., Ply-2
*End Part
**
**
** ASSEMBLY
**
*Assembly, name=Assembly
**
*Instance, name=cyllinder_1-1, part=cyllinder_1
*End Instance
**
*Nset, nset=Bottom, instance=cyllinder_1-1
    5,    6,  347,  348,  349,  350
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*Elset, elset=Bottom, instance=cyllinder_1-1
  2201,  2202,  2203,  2204,  2205,  2206
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*Nset, nset=RP_TOP, instance=cyllinder_1-1
 19201,
*Elset, elset=ShellElems, instance=cyllinder_1-1, generate
     1,  19000,      1
*Nset, nset=Top, instance=cyllinder_1-1
   17,   18, 1568, 1569, 1570, 1571
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*Elset, elset=Top, instance=cyllinder_1-1
 15301, 15302, 15303, 15304, 15305, 15306
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*Nset, nset=_PickedSet9, internal, instance=cyllinder_1-1
 19201,
*Nset, nset=_PickedSet17, internal, instance=cyllinder_1-1
    5,    6,  347,  348,  349,  350
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*Elset, elset=_PickedSet17, internal, instance=cyllinder_1-1
  2201,  2202,  2203,  2204,  2205,  2206
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*Nset, nset=_PickedSet19, internal, instance=cyllinder_1-1
 19201,
*Elset, elset=_TopEdgeSurface_E3, internal, instance=cyllinder_1-1
 15301, 15302, 15303, 15304, 15305, 15306
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*Surface, type=ELEMENT, name=TopEdgeSurface
_TopEdgeSurface_E3, E3
*Elset, elset=__PickedSurf8_E3, internal, instance=cyllinder_1-1
 15301, 15302, 15303, 15304, 15305, 15306
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*Surface, type=ELEMENT, name=_PickedSurf8, internal
__PickedSurf8_E3, E3
** Constraint: TopCoupling
*Coupling, constraint name=TopCoupling, ref node=_PickedSet9, surface=_PickedSurf8
*Kinematic
1, 1
2, 2
3, 3
*End Assembly
*Amplitude, name=Amp-1, definition=SMOOTH STEP
             0.,              0.,              1.,              1.
**
** MATERIALS
**
*Material, name=T700_IDEAL
*Density
 1.6e-09,
*Elastic, type=LAMINA
141000.,9500., 0.32,4000.,4000.,2100.
**
** BOUNDARY CONDITIONS
**
** Name: Bottom_BC Type: Displacement/Rotation
*Boundary
_PickedSet17, 1, 1
_PickedSet17, 2, 2
_PickedSet17, 3, 3
_PickedSet17, 4, 4
_PickedSet17, 5, 5
_PickedSet17, 6, 6
** ----------------------------------------------------------------
**
** STEP: LinearBuckle
**
*Step, name=LinearBuckle, nlgeom=NO, perturbation
*Buckle, eigensolver=lanczos
5, 0., , ,
**
** BOUNDARY CONDITIONS
**
** Name: Bottom_BC Type: Displacement/Rotation
*Boundary, op=NEW, load case=1
_PickedSet17, 1, 1
_PickedSet17, 2, 2
_PickedSet17, 3, 3
*Boundary, op=NEW, load case=2
_PickedSet17, 1, 1
_PickedSet17, 2, 2
_PickedSet17, 3, 3
**
** LOADS
**
** Name: Top_Load   Type: Concentrated force
*Cload
_PickedSet19, 3, -1.
**
** OUTPUT REQUESTS
**
*Restart, write, frequency=0
**
** FIELD OUTPUT: F-Output-1
**
*Output, field
*Node Output
RF, U
*Element Output, directions=YES
E, ENER, S
*End Step
